# Gearbox Design Project
# Lastname, Firstname A00000000
# Lastname, Firstname A00000000
# Lastname, Firstname A00000000
# Lastname, Firstname A00000000
# Lastname, Firstname A00000000
# This project is to design a gearbox to transmit power in a motor-jet axial compressor application. This team used AISI 1030 HR steel in the shaft, TODO: ADD MORE HERE
# NOTE!!!!: THE FINAL VERSION OF THIS DOCUMENT WILL HAVE TABLES OF THE CALCULATIONS AND SUCH FOR THE FIRST FEW PAGES, THEN IT WILL PRESENT THE FULL CALCULATIONS
# CAD drawing goes here
# Shaft Analysis Points
# Input Shaft
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# Output Shaft
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# Problem Specifications
# Properties of AISI 1030 HR
S_ult := 68 ksi  # Ultimate Tensile Strength
S_Y := 37.5 ksi  # Yield Strength
# Input Speed
n_g := 6700 rpm
# Output Speed
n_p := 20000 rpm
# Pre-Defined Gear Properties
ϕ_n := 20 deg  # Normal Pressure Angle
ψ := 30 deg  # Helix Angle
# Gear ratio, diameter, and transmitted force
# eqs
# 13-19
#
# 13-22
# 13-1
#
# 13-23
#
# 13-18
# table 13-2
# The gear ratio from the required shaft speeds
ratio := n_p/n_g = 2.98507
# Transverse pressure angle from normal pressure angle and helix angle
ϕ_t := atan(tan(ϕ_n)/cos(ψ)) = 22.7959 deg
# Minimum number of full height teeth for pinion for no interference
# eq (13-22)
N_p_min := ceil(2*cos(ψ)/((1 + 2*ratio)*sin(ϕ_t)^2)*(ratio + sqrt(ratio^2 + (1 + 2*ratio)*sin(ϕ_t)^2))) = 11
# Maximum number of full height teeth on gear for no interference
# eq (13-23)
N_g_max := floor((N_p_min^2*sin(ϕ_t)^2 - 4*cos(ψ)^2)/(4*cos(ψ) - 2*N_p_min*sin(ϕ_t)^2)) = 93
# Choose gear tooth numbers based on gear ratio that fit within interference bounds
N_p := 13
N_g := round(N_p*ratio) = 39
# Resulting output speed and % difference from specification
n_p_design := N_g/N_p*n_g = 20100 rpm
|(n_p - n_p_design)/n_p| = 0.005
# The % difference is 0.5%, less than the 1% required by "More Requirements: 1."
n_p := n_p_design
# SUPRESSED BECAUSE WE DON'T USE IT
# Normal diametrical pitch from teeth and helix angle
maxWidth := 15 - 1.5 = 13.5  # disabled
# max width from "More Requirements: 3."
P_n := round((N_p/cos(ψ) + N_g/(cos(ψ) + 2))/maxWidth) = 2  # disabled
# Normal diametrical pitch selected from table 13-2
P_n := 8 1/in
# Transverse diametrical pitch | eq (13-18)
P_t := P_n*cos(ψ) = 6.9282 1/in
# Gear and pinion diameters | eq (13-1)
d_p := N_p/P_t = 1.87639 in
d_g := N_g/P_t = 5.62917 in
# Pitch-line velocity | eq (13-34) (removed unit dependency)
V := d_g/2*n_g = 9873.87 ft/min
# Transmitted load | eq (13-35) (removed unit dependency)
Wt := 150 hp/V = 501.323 lbf
# Reaction Forces on Output Shaft
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# Previous Calculations
Wt = 501.323 lbf
ϕ_t = 22.7959 deg
d_p = 1.87639 in
# Component vectors of Wt (eq 13-40)
Wr32 := tan(ϕ_t)*Wt = 210.694 lbf
Wa32 := -tan(ψ)*Wt = -289.439 lbf
Wt32 := Wt = 501.323 lbf
# Sum of forces in axial direction
RCx := -Wa32 = 289.439 lbf
# Sum of moments in about the z-axis at the point C
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Mr32 := -(2/2 + .5 + .75/2)*in*Wr32 = -395.052 lbf*in
Ma32 := d_p/2*Wa32 = -271.55 lbf*in
RCy := (Mr32 + Ma32)/((.75/2 + .5 + 2 + .5 + .75/2) in) = -177.761 lbf
# Sum of forces in y direction
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RDy := -Wr32 - RCy = -32.9339 lbf
# Sum of moments about y at the point C
Mt32 := (2/2 + .5 + .75/2) in*Wt32 = 939.981 in*lbf
RDz := -Mt32/((.75/2 + .5 + 2 + .5 + .75/2) in) = -250.662 lbf
# Sum of forces in z direction
RCz := -Wt32 - RDz = -250.662 lbf
# The reaction forces on the output shaft are:
RCx = 289.439 lbf
RCy = -177.761 lbf
RCz = -250.662 lbf
RDy = -32.9339 lbf
RDz = -250.662 lbf
# Reaction Forces on Input Shaft
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# Previous Calculations
Wt = 501.323 lbf
ϕ_t = 22.7959 deg
d_g = 5.62917 in
# Component vectors of Wt (eq 13-40)
Wr23 := tan(ϕ_t)*Wt = 210.694 lbf
Wa23 := tan(ψ)*Wt = 289.439 lbf
Wt23 := -Wt = -501.323 lbf
# Sum of forces in axial direction
RBx := -Wa23 = -289.439 lbf
# Sum of moments about z at the point A
Mr23 := (2/2 + .5 + .75/2)*in*Wr23 = 395.052 lbf*in
Ma23 := d_g/2*Wa23 = 814.65 lbf*in
RBy := (-Mr23 - Ma23)/((.75/2 + .5 + 2 + .5 + .75/2) in) = -322.587 lbf
# Sum of forces in y direction
RAy := -Wr32 - RBy = 111.893 lbf
# Sum of moments about y at the point A
Mt23 := (2/2 + .5 + .75/2) in*Wt23 = -939.981 lbf*in
RBz := Mt23/((.75/2 + .5 + 2 + .5 + .75/2) in) = -250.662 lbf
# Sum of forces in z direction
RAz := -RBz - Wt23 = 751.985 lbf
# The reaction forces on the output shaft are:
RBx = -289.439 lbf
RBy = -322.587 lbf
RBz = -250.662 lbf
RAy = 111.893 lbf
RAz = 751.985 lbf
# AGMA Coefficients
# Shaft Point Analysis
